# OpenSim document version 30000
ScaleTool Kinect Lower Limb-scaled:
  mass: 41.128
  height: -1
  age: -1
  GenericModelMaker:
    model_file: Kinect_no_markers.osim
    marker_set_file: kinectMarkers.xml
  ModelScaler:
    apply: true
    marker_file: motion.trc
    time_range: 0.047 12.715
    preserve_mass_distribution: false
  MarkerPlacer:
    apply: true
    marker_file: motion.trc
    time_range: 0.047 1
    max_marker_movement: -1
    IKTaskSet:
      IKMarkerTask mPelvis: apply=true weight=1
      IKMarkerTask mHipR: apply=true weight=1
      IKMarkerTask mHipL: apply=true weight=1
      IKMarkerTask mKneeR: apply=true weight=1
      IKMarkerTask mKneeL: apply=true weight=1
      IKMarkerTask mAnkleR: apply=true weight=1
      IKMarkerTask mAnkleL: apply=true weight=1
      IKMarkerTask mToesR: apply=true weight=1
      IKMarkerTask mToesL: apply=true weight=1
